// SBML level 2 version 4

function Constant_flux__irreversible(v)
  v;
end
Constant_flux__irreversible is "Constant flux (irreversible)";

function Henri_Michaelis_Menten__irreversible(substrate, Km, V)
  V*substrate/(Km + substrate);
end
Henri_Michaelis_Menten__irreversible is "Henri-Michaelis-Menten (irreversible)";

function Rate_Law_for_a3(k3, A, B, k4)
  k3*A*B/(A + k4);
end

function Rate_Law_A(k2, G)
  k2*G;
end

model New_Model()

  // Compartments:
  compartment compartment = 1;

  // Species:
  species G in compartment = 10;
  species PLC in compartment = 10;
  species Ca in compartment = 10;

  // Reactions:
  constG: => G; compartment*Constant_flux__irreversible(v);
    v = 212;
  mlG: => G; compartment*Rate_Law_A(mlG_k2, G);
    mlG_k2 = 2.85;
  mlP: => PLC; compartment*Rate_Law_A(mlP_k2, G);  // modifiers: G
    mlP_k2 = 1.24;
  mlCa: => Ca; compartment*Rate_Law_A(mlCa_k2, G);  // modifiers: G
    mlCa_k2 = 13.58;
  a3: G => ; compartment*Rate_Law_for_a3(a3_k3, G, PLC, a3_k4);  // modifiers: PLC
    a3_k3 = 1.52; a3_k4 = 190;
  a4: G => ; compartment*Rate_Law_for_a3(a4_k3, G, Ca, a4_k4);  // modifiers: Ca
    a4_k3 = 4.88; a4_k4 = 1180;
  b2: PLC => ; compartment*Henri_Michaelis_Menten__irreversible(PLC, b2_Km, b2_V);
    b2_Km = 29090; b2_V = 32240;
  b3: Ca => ; compartment*Henri_Michaelis_Menten__irreversible(Ca, b3_Km, b3_V);
    b3_Km = 160; b3_V = 153000;

  // Unit definitions:
  unit volume = 1e-3 litre;
  unit substance = item;
end
